*Heading
** Job name: Axisy_LD_part Model name: Axisy_verify_Dbi
** Generated by: Abaqus/CAE 2023
*Preprint, echo=NO, model=NO, history=NO, contact=NO
**
** PARTS
**
*Part, name=Part-1
*Node
      1,   7.49889326,   2.02576995
      2,          7.5,           2.
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*Element, type=CPS4
   1,  843,  842,  844,  846
   2,  841,  851,  852,  161
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*Nset, nset=_PickedSet99, internal, generate
    1,  3219,     1
*Elset, elset=_PickedSet99, internal, generate
    1,  3048,     1
*Nset, nset=Fixed
  15,  16,  17,  18,  19,  20
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*Nset, nset=TopNodeSet
  54,  55,  56,  57,  58,  59
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*Elset, elset=_pressure_S3, internal
    6,   10,   11,   13,   92,  564,  637, 1076, 1078, 1080, 1081, 1082, 1432
*Elset, elset=_pressure_S2, internal
  435,  507,  508,  565,  591,  597
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*Elset, elset=_pressure_S1, internal
   70,   82,   83,   88, 1194, 1212, 1250, 1251, 1253, 1429, 1431, 1433, 1434, 1503, 1504
*Elset, elset=_pressure_S4, internal
    2,    3,    4,  405,  415,  416
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*Surface, type=ELEMENT, name=pressure
_pressure_S3, S3
_pressure_S2, S2
_pressure_S4, S4
_pressure_S1, S1
** Section: Section-1
*Solid Section, elset=_PickedSet99, material=Material-1
,
*End Part
**
**
** ASSEMBLY
**
*Assembly, name=Assembly
**
*Instance, name=Part-1-1, part=Part-1
          0.,         -1.5,           0.
*End Instance
**
*End Assembly
**
** MATERIALS
**
*Material, name=Material-1
*Elastic
150000., 0.3
*Plastic, hardening=COMBINED, datatype=PARAMETERS, number backstresses=1
191.,0.,0.
*Cyclic Hardening, parameters
191., 583., 6.95
** ----------------------------------------------------------------
**
** STEP: Step-1
**
*Step, name=Step-1, nlgeom=YES, inc=10000
*Static
0.05, 1., 1e-05, 0.05
**
** BOUNDARY CONDITIONS
**
** Name: BC-1 Type: Displacement/Rotation
*Boundary
Part-1-1.Fixed, 1, 1
Part-1-1.Fixed, 2, 2
Part-1-1.Fixed, 6, 6
**
** LOADS
**
** Name: Load-1   Type: Pressure
*Dsload
Part-1-1.pressure, P, 20.
**
** OUTPUT REQUESTS
**
*Restart, write, frequency=0
**
** FIELD OUTPUT: F-Output-1
**
*Output, field
*Node Output
U,
*Element Output, directions=YES
LE, P, PE, PEEQ, PEMAG, S
**
** HISTORY OUTPUT: H-Output-1
**
*Output, history, variable=PRESELECT
*End Step
